// SBML level 3 version 2

model chaves_tnf_network_model()
  // model units - time: second

  // Compartments:
  compartment central = 1 liter;

  // Species:
  species tumour_necrosis_factor in central = 0;  // substance in mg

  // Parameters:
  caspase_3 = 1 mg_per_L;
  caspase_8 = 1 mg_per_L;
  nf_kappaB = 1 mg_per_L;
  nf_kappaB_inhibitor = 1 mg_per_L;
  activation_rate_c8_tnf = 1 mg_per_L_per_second;
  activation_rate_c8_c3 = 1 mg_per_L_per_second;
  deactivation_rate_c8 = 1 per_second;
  half_maximal_inhibitory_concentration_c8_nf = 1 mg_per_L;
  half_maximal_effect_concentration_c8_tnf = 1 mg_per_L;
  half_maximal_effect_concentration_c8_c3 = 1 mg_per_L;
  activation_rate_c3 = 1 mg_per_L_per_second;
  deactivation_rate_c3 = 1 per_second;
  half_maximal_inhibitory_concentration_c3_nf = 1 mg_per_L;
  half_maximal_effect_concentration_c3_c8 = 1 mg_per_L;
  activation_rate_nf = 1 mg_per_L_per_second;
  deactivation_rate_nf = 1 per_second;
  half_maximal_inhibitory_concentration_nf_inf = 1 mg_per_L;
  half_maximal_inhibitory_concentration_nf_c3 = 1 mg_per_L;
  activation_rate_inf_tnf = 1 mg_per_L_per_second;
  activation_rate_inf_nf = 1 mg_per_L_per_second;
  deactivation_rate_inf = 1 per_second;
  half_maximal_inhibitory_concentration_inf_tnf = 1 mg_per_L;
  half_maximal_inhibitory_concentration_inf_nf = 1 mg_per_L;
  elimination_rate = 1 per_second;
  deactivation_c3 has mg_per_L_per_second;
  activation_c3 has mg_per_L_per_second;
  deactivation_c8 has mg_per_L_per_second;
  activation_c8_tnf has mg_per_L_per_second;
  activation_c8_c3 has mg_per_L_per_second;
  deactivation_nf has mg_per_L_per_second;
  activation_nf has mg_per_L_per_second;
  deactivation_inf has mg_per_L_per_second;
  activation_inf_tnf has mg_per_L_per_second;
  activation_inf_nf has mg_per_L_per_second;

  // Assignment rules:
  activation_c3 := activation_rate_c3*(half_maximal_inhibitory_concentration_c3_nf^2/(nf_kappaB^2 + half_maximal_inhibitory_concentration_c3_nf^2))*(caspase_8^2/(caspase_8^2 + half_maximal_effect_concentration_c3_c8^2));
  deactivation_c3 := deactivation_rate_c3*caspase_3;
  activation_c8_tnf := activation_rate_c8_tnf*(half_maximal_inhibitory_concentration_c8_nf^2/(nf_kappaB^2 + half_maximal_inhibitory_concentration_c8_nf^2))*(tumour_necrosis_factor^2/(tumour_necrosis_factor^2 + half_maximal_effect_concentration_c8_tnf^2));
  activation_c8_c3 := activation_rate_c8_c3*(caspase_3^2/(caspase_3^2 + half_maximal_effect_concentration_c8_c3^2));
  deactivation_c8 := deactivation_rate_c8*caspase_8;
  activation_nf := activation_rate_nf*(half_maximal_inhibitory_concentration_nf_c3^2/(caspase_3^2 + half_maximal_inhibitory_concentration_nf_c3^2))*(half_maximal_inhibitory_concentration_nf_inf^2/(nf_kappaB_inhibitor^2 + half_maximal_inhibitory_concentration_nf_inf^2));
  deactivation_nf := deactivation_rate_nf*nf_kappaB;
  activation_inf_tnf := activation_rate_inf_tnf*(half_maximal_inhibitory_concentration_inf_tnf^2/(tumour_necrosis_factor^2 + half_maximal_inhibitory_concentration_inf_tnf^2));
  activation_inf_nf := activation_rate_inf_nf*(half_maximal_inhibitory_concentration_inf_nf^2/(nf_kappaB^2 + half_maximal_inhibitory_concentration_inf_nf^2));
  deactivation_inf := deactivation_rate_inf*nf_kappaB_inhibitor;

  // Rate rules:
  caspase_3' = activation_c3 - deactivation_c3;
  caspase_8' = activation_c8_tnf + activation_c8_c3 - deactivation_c8;
  nf_kappaB' = activation_nf - deactivation_nf;
  nf_kappaB_inhibitor' = activation_inf_tnf + activation_inf_nf - deactivation_inf;

  // Reactions:
  tnf_elimination: tumour_necrosis_factor => ; elimination_rate*tumour_necrosis_factor;

  // Unit definitions:
  unit per_second = 1 / second;
  unit mg = 1e-3 gram;
  unit mg_per_L_per_second = 1e-3 gram / (liter * second);
  unit L_per_mg_per_second = liter / (1e-3 gram * second);
  unit mg_per_L = 1e-3 gram / liter;
end
