// SBML level 3 version 2

model lambert_growth_factor_model()
  // model units - time: second

  // Compartments:
  compartment central = 1 liter;

  // Species:
  species receptor_inactive in central = 0;  // substance in mg
  species receptor_active in central = 0;  // substance in mg
  species ligand in central = 0;  // substance in mg

  // Parameters:
  production_rate = 1 mg_per_L_per_second;
  activation_rate = 1 L_per_mg_per_second;
  deactivation_rate = 1 per_second;
  degradation_rate_active_receptor = 1 per_second;
  degradation_rate_inactive_receptor = 1 per_second;

  // Reactions:
  receptor_production: => receptor_inactive; 1*production_rate;
  receptor_activation: receptor_inactive => receptor_active; activation_rate*ligand*receptor_inactive;  // modifiers: ligand
  receptor_deactivation: receptor_active => receptor_inactive; deactivation_rate*receptor_active;
  inactive_receptor_degradation: receptor_inactive => ; degradation_rate_inactive_receptor*receptor_inactive;
  active_receptor_degradation: receptor_active => ; degradation_rate_active_receptor*receptor_active;

  // Unit definitions:
  unit per_second = 1 / second;
  unit mg = 1e-3 gram;
  unit mg_per_L_per_second = 1e-3 gram / (liter * second);
  unit L_per_mg_per_second = liter / (1e-3 gram * second);
  unit mg_per_l = 1e-3 gram / liter;
end
